OpenVSP model (file version 5), 5 components.
Geometry view with OpenVSP parameter names; values to 6 digits, angles in degrees, lengths in the model's unit.
Overall bounding box: X_Min=-0.531391 X_Len=1.03139 Y_Min=-1.15198 Y_Len=2.30395 Z_Min=-0.076 Z_Len=0.36505

Wing "Wing"
  location (X Y Z) -0.1 0 0, rotation 0 0 0
  symmetric about XZ
  bounding box size 0.456145 2.30395 0.311832
  totals: TotalSpan=2.65387 TotalProjectedSpan=2.3 TotalChord=0.207953 TotalArea=0.721532 TotalAR=7.33162 MAC=0.322918
  root: chord 0.455382, twist 0, NACA 4-series Camber=0 CamberLoc=0.2 ThickChord=0.1
  sections:
    n  Span       Root_Chord  Tip_Chord  Area       Sweep  Sweep_Location  Dihedral  Twist      Twist_Location  tip airfoil
    1  0.4025     0.455382    0.370625   0.166234   12     0               0         -0.897436  0.25            NACA 4-series Camber=0.02 CamberLoc=0.2 ThickChord=0.09
    2  0.4945     0.370625    0.185543   0.137513   12     0               0         0          0.25            as above
    3  0.0924589  0.185543    0.162757   0.0161017  12     0               5.71059   -1.5       0.25            as above
    4  0.0782     0.162757    0.142412   0.0119321  12     0               28.0725   -1         0.25            as above
    5  0.102859   0.142412    0.117999   0.0133928  12     0               63.4349   0          0.25            as above
    6  0.156417   0.117999    0.0813786  0.015593   12     0               72.8973   0          0.25            as above
  SS_Control "SS_CONT_0": EtaStart=0.304348 EtaEnd=0.652174 Length_C_Start=0.25 Length_C_End=0.25 Length_Start=0.09253 Length_End=0.0493427 LE_Flag=0 Surf_Type=2

Wing "Canard"
  location (X Y Z) -0.48 0 0.035, rotation 0 0 0
  symmetric about XZ
  bounding box size 0.232524 0.62837 0.0232659
  totals: TotalSpan=0.6 TotalProjectedSpan=0.6 TotalChord=0.196192 TotalArea=0.117715 TotalAR=3.05822 MAC=0.198435
  root: chord 0.232524, twist 0, NACA 4-series Camber=0 CamberLoc=0.2 ThickChord=0.1
  sections:
    n  Span  Root_Chord  Tip_Chord  Area       Sweep    Sweep_Location  Dihedral  Twist  Twist_Location  tip airfoil
    1  0.3   0.232524    0.159861   0.0588577  3.81407  0               0         0      0.25            NACA 4-series Camber=0 CamberLoc=0.2 ThickChord=0.09

Fuselage "Fuselage"
  location (X Y Z) -0.52 0 0, rotation 0 0 0
  bounding box size 1.03139 0.155 0.152
  Design: Length=1.02
  cross sections:
    n  XLocPercent  YLocPercent  ZLocPercent  shape
    0  0            0            0            ellipse Ellipse_Height=0.055 Ellipse_Width=0.055
    1  0.0490196    0            0            ellipse Ellipse_Height=0.11 Ellipse_Width=0.095
    2  0.156863     0            0            ellipse Ellipse_Height=0.125 Ellipse_Width=0.115
    3  0.27451      0            0            ellipse Ellipse_Height=0.135 Ellipse_Width=0.13
    4  0.5          0            0            ellipse Ellipse_Height=0.152 Ellipse_Width=0.155
    5  0.745098     0            0            ellipse Ellipse_Height=0.108 Ellipse_Width=0.11
    6  0.921569     0            0            ellipse Ellipse_Height=0.04 Ellipse_Width=0.04
    7  1            0            0            point

Propeller "Prop_Left"
  location (X Y Z) 0.07 -0.625 0.02, rotation 0 0 0
  bounding box size 0.0264885 0.53396 0.0517444
  Design: Diameter=0.533 NumBlade=2 Beta34=20 UseBeta34Flag=1 Feather=0 Rotate=0 Precone=0 ReverseFlag=1 FoldAngle=0 PropMode=0 AF=151.538 CLi=0.538798 Chord=0.177656 Solidity=0.113099 ConstructXoC=0.5 FeatherAxisXoC=0.5 FeatherOffsetXoC=0
  cross sections:
    n  RadiusFrac  shape
    0  0.2         ellipse Ellipse_Height=0.01066 Ellipse_Width=0.02132
    1  0.4         NACA 16-series Chord=0.0443056 IdealCl=0.7 ThickChord=0.144074
    2  1           NACA 16-series Chord=0.034645 IdealCl=0.2 ThickChord=0.03
  Chord along r/R (cubic Bezier): 0.2: 0.08, 0.333333: 0.15, 0.466667: 0.2, 0.6: 0.2, 0.716667: 0.2, 0.833333: 0.2, 0.95: 0.2, 0.966667: 0.2, 0.983333: 0.2, 1: 0.13
  Twist along r/R (PCHIP): 0.2: 46.75, 0.75: 20, 1: 13
  Thick along r/R (cubic Bezier): 0.2: 0.5, 0.233333: 0.3, 0.266667: 0.225, 0.3: 0.2, 0.4: 0.125, 0.5: 0.115, 0.6: 0.1, 0.733333: 0.075, 0.866667: 0.055, 1: 0.03
  CLI along r/R (cubic Bezier): 0.2: 0, 0.266667: 0.7, 0.333333: 0.7, 0.4: 0.7, 0.466667: 0.7, 0.533333: 0.7, 0.6: 0.7, 0.733333: 0.7, 0.866667: 0.7, 1: 0.2

Propeller "Prop_Right"
  location (X Y Z) 0.07 0.625 0.02, rotation 0 0 0
  bounding box size 0.0264885 0.53396 0.0517444
  Design: Diameter=0.533 NumBlade=2 Beta34=20 UseBeta34Flag=1 Feather=0 Rotate=0 Precone=0 ReverseFlag=0 FoldAngle=0 PropMode=0 AF=151.538 CLi=0.538798 Chord=0.177656 Solidity=0.113099 ConstructXoC=0.5 FeatherAxisXoC=0.5 FeatherOffsetXoC=0
  cross sections:
    n  RadiusFrac  shape
    0  0.2         ellipse Ellipse_Height=0.01066 Ellipse_Width=0.02132
    1  0.4         NACA 16-series Chord=0.0443056 IdealCl=0.7 ThickChord=0.144074
    2  1           NACA 16-series Chord=0.034645 IdealCl=0.2 ThickChord=0.03
  blade curves as in "Prop_Left"
